// SBML level 3 version 2

model KaratzaKaralis2020___CYP_mediated_losartan_metabolism()
  // initial_model
  // model units - time: h, extent: pmol

  // Compartments:
  compartment default = 1 dimensionless; default is "KaratzaKaralis2020 - CYP mediated losartan metabolism";
  compartment central_compartment = 1 dimensionless;
  compartment intestine = 1 dimensionless;
  compartment peripherial_compartment = 1 dimensionless;
  compartment stomach = 1 dimensionless;

  // Species:
  species E3174_out in default = 0;  // substance in pmol
  species E3174_cc in central_compartment = 0;  // substance in pmol
  species losartan_cc in central_compartment = 0;  // substance in pmol
  species losartan_int in intestine = 0;  // substance in pmol
  species losartan_out in default = 0;  // substance in pmol
  species losartan_pc in peripherial_compartment = 0;  // substance in pmol
  species losartan_stm in stomach = oral_dose/(1000 mg_per_g*461.01 g_per_mole)*1e12 pmol_per_mol;  // substance in pmol

  // Parameters:
  // L/h
  CL_m = 5.5 L_per_h;
  // L/h
  CL_p = 184 L_per_h;
  // pmol/ml или nmol/L
  C_m has nmol_per_L;
  // pmol/ml или nmol/L
  C_p has nmol_per_L;
  // L/h
  Q = 129 L_per_h;
  // h
  T = 0.271 h;
  // L
  Vm = 9.66 litre;
  // L
  Vp_1 = 43.7 litre;
  // L
  Vp_2 = 1160 litre;
  // 1/h
  a = 4.56 per_h;
  // h
  b = 3.95 h;
  // 1/h
  k_12 has per_h;
  // 1/h
  k_21 has per_h;
  // 1/h
  k_a = 1.93 per_h;
  // 1/h
  k_elm has per_h;
  // 1/h
  k_elp has per_h;
  // 1/h
  k_m = 0.452 per_h;
  // mg
  oral_dose = 100 mg;
  // dimensionless
  start_CYP2C9 = 0 dimensionless;

  // Assignment rules:
  C_p := losartan_cc/(Vp_1*1000 ml_per_L);
  C_m := E3174_cc/(Vm*1000 ml_per_L);
  k_12 := Q/Vp_1;
  k_21 := Q/Vp_2;
  k_elp := CL_p/Vp_1;
  k_elm := CL_m/Vm;

  // Reactions:
  E3174_elimination: E3174_cc => E3174_out; k_elm*E3174_cc; E3174_elimination is "E3174_cc -> E3174_out";
  L_from_cc_to_pc: losartan_cc => losartan_pc; k_12*losartan_cc; L_from_cc_to_pc is "losartan_cc -> losartan_pc";
  L_from_pc_to_cc: losartan_pc => losartan_cc; k_21*losartan_pc; L_from_pc_to_cc is "losartan_pc -> losartan_cc";
  absorption: losartan_int => losartan_cc; k_a*losartan_int; absorption is "losartan_int -> losartan_cc";
  CYP2C9_reaction: losartan_cc => E3174_cc; k_m*losartan_cc*start_CYP2C9; CYP2C9_reaction is "losartan_cc -> E3174_cc";
  L_elimination: losartan_cc => losartan_out; k_elp*losartan_cc; L_elimination is "losartan_cc -> losartan_out";
  gastric_emptying: losartan_stm => losartan_int; max(0 per_h, a*sin(2*pi/b*time))*losartan_stm; gastric_emptying is "losartan_stm -> losartan_int";

  // Events:
  CYP2C9_delay: at (time > T), t0=false: start_CYP2C9 = 1; CYP2C9_delay is "losartan metabolism delay";

  // Unit definitions:
  unit g_per_mole = 1e-3 kilogram / mole;
  unit pmol_per_mol = 1e-12 mole / mole;
  unit h = 3600 second;
  unit mg_per_g = 1e-6 kilogram / (1e-3 kilogram);
  unit mg = 1e-6 kilogram;
  unit nmol_per_L = 1e-9 mole / litre;
  unit L_per_h = litre / (3600 second);
  unit ml_per_L = 1e-3 litre / litre;
  unit pmol = 1e-12 mole;
  unit per_h = 1 / (3600 second);
end
