// SBML level 3 version 2

model final_model()
  // GE_model_2

  // Compartments:
  compartment default = 1; default is "final_model";
  compartment central_compartment = 1;
  compartment intestine = 1;
  compartment stomach = 1;

  // Species:
  species E3174_out in default = 0;
  species E3174_cc in central_compartment = 0;
  species losartan_cc in central_compartment = 0;
  species losartan_int in intestine = 0;
  species losartan_out in default = 0;
  species losartan_stm in stomach = 50/(1000*461.01)*1e12;

  // Parameters:
  // nmol*h/L
  AUC_C = 0;
  // nmol*h/L
  AUC_L = 0;
  // L/h
  CL_m = 11.923;
  // L/h
  CL_p = 38.939;
  // 1/h
  T = 0.847;
  // L
  Vm = 31.541;
  // L
  Vp_1 = 8.476;
  // 1/h
  a = 13.854;
  // 1/h
  b = 3.95;
  // 1/h
  k_a = 0.295;
  // 1/h
  k_m = 0.452;
  // безразмерная
  start_CYP2C9 = 0;

  // Assignment rules:
  C_p := losartan_cc/(Vp_1*1000);
  C_m := E3174_cc/(Vm*1000);
  AUC_ratio := piecewise(0, C_m == 0, AUC_L/AUC_C);
  k_elp := CL_p/Vp_1;
  k_elm := CL_m/Vm;

  // Rate rules:
  AUC_L' = C_p;
  AUC_C' = C_m;

  // Reactions:
  E3174_elimination: E3174_cc => E3174_out; k_elm*E3174_cc; E3174_elimination is "E3174_cc -> E3174_out";
  absorption: losartan_int => losartan_cc; k_a*losartan_int; absorption is "losartan_int -> losartan_cc";
  CYP2C9_reaction: losartan_cc => E3174_cc; k_m*losartan_cc*start_CYP2C9; CYP2C9_reaction is "losartan_cc -> E3174_cc";
  L_elimination: losartan_cc => losartan_out; k_elp*losartan_cc; L_elimination is "losartan_cc -> losartan_out";
  gastric_emptying: losartan_stm => losartan_int; max(0, a*sin(2*pi/b*time))*losartan_stm; gastric_emptying is "losartan_stm -> losartan_int";

  // Events:
  CYP2C9_delay: at (time > T), t0=false: start_CYP2C9 = 1;
end
